// SBML level 2 version 3

model LotkaVolterra()

  // Compartments:
  compartment cell = 1;

  // Species:
  species Prey in cell = 10/cell;  // substance in item
  species Predator in cell = 5/cell;  // substance in item

  // Parameters:
  alpha = 1.1 per_second;
  beta = 0.4 per_item_second;
  gamma = 0.4 per_second;

  // Reactions:
  PreyGrowth: Prey => 2 Prey; alpha*Prey^1;
  Predation: Prey + 1.1 Predator => 2 Predator; beta*Prey^1*Predator^1.1;
  PredatorDeath: Predator => ; gamma*Predator^1;

  // Events:
  IncreasePreyGrowth: at (Prey < 10): alpha = 3.5;
  ReducePredationRate: at (Predator > 20): beta = 0.2;

  // Unit definitions:
  unit per_second = 1 / second;
  unit per_item_second = 1 / (item * second);
end
